# -*- coding: utf-8 -*-
from stlib.scene import Scene

def createScene(rootNode):
    scene = Scene(rootNode)
    scene.VisualStyle.displayFlags = "showBehavior"

    ### Step 1.1
    ### Concepts to teach: Node, Object,
    visual = scene.createChild("Visual")
    visual.createObject("MeshSTLLoader", name="loader", filename="data/mesh/tripod.stl")
    visual.createObject("OglModel", name="renderer", src="@loader", color=[1.0,1.0,1.0,0.5])
